Thu 30 Jan 2025 11:51:13 PST
;; 1. Based on:
;; 2. Description: PK model 2 cmt oral
;; x1. Author: user
$PROBLEM    PK model
$INPUT      ID TIME DV MDV AMT II=DROP ADDL=DROP
$DATA      drugB_NM_3.csv IGNORE=@
$SUBROUTINE ADVAN4 TRANS4 ;; 2-compartment oral data
$PK
  CL = THETA(3) * EXP(ETA(1))
  V2 = THETA(4) * EXP(ETA(2))
  V3 = THETA(5)
  Q = THETA(6)
  KA = THETA(7)

  F1   = 1
  S1 = V2   ;; scaling of compartment check units of dose and observations

$THETA  (0,0.1) ; 1 prop
 (0,0.5) ; 2 add
 (0,30) ; 3 CL
 (0,200) ; 4 V2
 (0,1000) ; 5 V3
 (0,20) ; 6 Q
 (0,0.32) ; 7 KA
  	;; set realistic initial estimates (also for proportional and additive error)
$OMEGA  0.09  ;             ;     IIV-CL
 0.09  ;          _  ;      IIV-V
$SIGMA  1  FIX  ; residual variability
$ERROR  	;; For calculation based on linear (non log-transformed) data
  IPRED = F
  IRES = DV-IPRED
  W = IPRED*THETA(1)+THETA(2)
  IF (W.EQ.0) W = 1
  IWRES = IRES/W
  Y= IPRED+W*ERR(1)

$ESTIMATION METHOD=1 MAXEVAL=99999 SIG=3 PRINT=5 NOABORT POSTHOC
            INTERACTION ;; Estimation method FOCE+interaction
$COVARIANCE PRINT=E UNCONDITIONAL
$TABLE      ID TIME IPRED IWRES CWRES EVID MDV TIME NOPRINT ONEHEADER
            FILE=SDTAB002
$TABLE      ID CL V2 V3 ETA1 ETA2 NOPRINT ONEHEADER FILE=PATAB002
$TABLE      ID NOPRINT ONEHEADER FILE=COTAB002
$TABLE      ID NOPRINT ONEHEADER FILE=CATAB002

NM-TRAN MESSAGES
 WARNINGS AND ERRORS (IF ANY) FOR PROBLEM    1
 (WARNING  2) NM-TRAN INFERS THAT THE DATA ARE POPULATION.
Note: Analytical 2nd Derivatives are constructed in FSUBS but are never used.
      You may insert $ABBR DERIV2=NO after the first $PROB to save FSUBS construction and compilation time

1NONLINEAR MIXED EFFECTS MODEL PROGRAM (NONMEM) VERSION 7.5.1
 ORIGINALLY DEVELOPED BY STUART BEAL, LEWIS SHEINER, AND ALISON BOECKMANN
 CURRENT DEVELOPERS ARE ROBERT BAUER, ICON DEVELOPMENT SOLUTIONS,
 AND ALISON BOECKMANN. IMPLEMENTATION, EFFICIENCY, AND STANDARDIZATION
 PERFORMED BY NOUS INFOSYSTEMS.
 PROBLEM NO.:         1
 PK model
 TOT. NO. OF OBS RECS:     1177
 TOT. NO. OF INDIVIDUALS:      100
 TWO COMPARTMENT MODEL WITH FIRST-ORDER ABSORPTION (ADVAN4)
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 #TBLN:      1
 #METH: First Order Conditional Estimation with Interaction
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
 #TERM:
0MINIMIZATION TERMINATED
 DUE TO ROUNDING ERRORS (ERROR=133)
 NO. OF FUNCTION EVALUATIONS USED:      210
 NO. OF SIG. DIGITS UNREPORTABLE
0PARAMETER ESTIMATE IS NEAR ITS BOUNDARY

 ETABAR IS THE ARITHMETIC MEAN OF THE ETA-ESTIMATES,
 AND THE P-VALUE IS GIVEN FOR THE NULL HYPOTHESIS THAT THE TRUE MEAN IS 0.

 ETABAR:        -1.6131E-05  2.4360E-02
 SE:             6.9858E-05  2.5146E-02
 N:                     100         100

 P VAL.:         8.1738E-01  3.3267E-01

 ETASHRINKSD(%)  9.6764E+01  6.5924E+00
 ETASHRINKVR(%)  9.9895E+01  1.2750E+01
 EBVSHRINKSD(%)  9.7881E+01  7.6693E+00
 EBVSHRINKVR(%)  9.9955E+01  1.4750E+01
 RELATIVEINF(%)  2.3119E-02  4.3893E+01
 EPSSHRINKSD(%)  2.8752E+00
 EPSSHRINKVR(%)  5.6678E+00


 TOTAL DATA POINTS NORMALLY DISTRIBUTED (N):         1177
 N*LOG(2PI) CONSTANT TO OBJECTIVE FUNCTION:    2163.1813071637994
 OBJECTIVE FUNCTION VALUE WITHOUT CONSTANT:    4106.7020664924403
 OBJECTIVE FUNCTION VALUE WITH CONSTANT:       6269.8833736562392
 REPORTED OBJECTIVE FUNCTION DOES NOT CONTAIN CONSTANT

 TOTAL EFFECTIVE ETAS (NIND*NETA):                           200


 #TERE:
 Elapsed estimation  time in seconds:     0.98
0R MATRIX ALGORITHMICALLY SINGULAR
 AND ALGORITHMICALLY NON-POSITIVE-SEMIDEFINITE
0R MATRIX IS OUTPUT
0COVARIANCE STEP ABORTED
 Elapsed covariance  time in seconds:     1.29
 Elapsed postprocess time in seconds:     0.02

 ********************               FIRST ORDER CONDITIONAL ESTIMATION WITH INTERACTION              ********************
 #OBJT:**************                       MINIMUM VALUE OF OBJECTIVE FUNCTION                      ********************
 #OBJV:********************************************     4106.702       **************************************************

 ********************               FIRST ORDER CONDITIONAL ESTIMATION WITH INTERACTION              ********************
 ********************                             FINAL PARAMETER ESTIMATE                           ********************

 THETA - VECTOR OF FIXED EFFECTS PARAMETERS   *********
         TH 1      TH 2      TH 3      TH 4      TH 5      TH 6      TH 7
         3.26E-01  6.13E-01  2.51E+00  2.00E+00  2.48E+02  1.50E+01  3.11E-01

 OMEGA - COV MATRIX FOR RANDOM EFFECTS - ETAS  ********
         ETA1      ETA2
 ETA1
+        4.66E-04
 ETA2
+        0.00E+00  7.25E-02

 SIGMA - COV MATRIX FOR RANDOM EFFECTS - EPSILONS  ****
         EPS1
 EPS1
+        1.00E+00

 OMEGA - CORR MATRIX FOR RANDOM EFFECTS - ETAS  *******
         ETA1      ETA2
 ETA1
+        2.16E-02
 ETA2
+        0.00E+00  2.69E-01

 SIGMA - CORR MATRIX FOR RANDOM EFFECTS - EPSILONS  ***
         EPS1
 EPS1
+        1.00E+00
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 Elapsed finaloutput time in seconds:     0.05
 #CPUT: Total CPU Time in Seconds,        2.415
