Thu Jan 30 11:32:51 PST 2025
;; 1. Based on: 106
;; 2. Description: PK model
;; x1. Author: user
$PROBLEM    PK model
$INPUT      ID DATE=DROP TIME AMT II ADDL DV MDV
$DATA      test_data.csv IGNORE=@
$SUBROUTINE ADVAN2 TRANS2
$PK

TVCL  = THETA(1)* EXP(ETA(1))
CL    = TVCL
TVV   = THETA(2)*EXP(ETA(2))
V    = TVV
TVKA   = THETA(3)* EXP(ETA(3))
KA  = TVKA

F1 = 1

S2=V

$ERROR
IPRED = F
PROP=THETA(4)
ADD=THETA(5)
W   = SQRT(PROP**2*IPRED**2 + ADD**2)
IRES = DV-IPRED

IWRES = IRES/W
Y=F+W*EPS(1)

$THETA  (0,3.78) ; CLTV
 (0,31.4) ; VTV
 (0,1.01) ; KATV
 (0,0.0951) ; prop error
 0 FIX ; additive error
$OMEGA  0.0719  ;     IIV CL
 0.0404  ;      IIV V
 0.126  ;     IIV KA
$SIGMA  1  FIX  ;        PRO
$ESTIMATION METHOD=1 INTERACTION MAXEVAL=99999 POSTHOC NOABORT PRINT=5
$COVARIANCE UNCONDITIONAL MATRIX=S PRINT=E
$TABLE      ID TIME AMT MDV KA CL V CWRES NPDE IPRED NOPRINT ONEHEADER
            FILE=sdtab107
;$TABLE ID  ONEHEADER NOPRINT FILE=cotab107

;$TABLE ID  ONEHEADER NOPRINT FILE=catab107

NM-TRAN MESSAGES
 WARNINGS AND ERRORS (IF ANY) FOR PROBLEM    1
 (WARNING  2) NM-TRAN INFERS THAT THE DATA ARE POPULATION.
Note: Analytical 2nd Derivatives are constructed in FSUBS but are never used.
      You may insert $ABBR DERIV2=NO after the first $PROB to save FSUBS construction and compilation time

1NONLINEAR MIXED EFFECTS MODEL PROGRAM (NONMEM) VERSION 7.5.1
 ORIGINALLY DEVELOPED BY STUART BEAL, LEWIS SHEINER, AND ALISON BOECKMANN
 CURRENT DEVELOPERS ARE ROBERT BAUER, ICON DEVELOPMENT SOLUTIONS,
 AND ALISON BOECKMANN. IMPLEMENTATION, EFFICIENCY, AND STANDARDIZATION
 PERFORMED BY NOUS INFOSYSTEMS.
 PROBLEM NO.:         1
 PK model
 TOT. NO. OF OBS RECS:       90
 TOT. NO. OF INDIVIDUALS:       15
 ONE COMPARTMENT MODEL WITH FIRST-ORDER ABSORPTION (ADVAN2)
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 #TBLN:      1
 #METH: First Order Conditional Estimation with Interaction
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
 #TERM:
0MINIMIZATION SUCCESSFUL
 NO. OF FUNCTION EVALUATIONS USED:      203
 NO. OF SIG. DIGITS IN FINAL EST.:  3.1

 ETABAR IS THE ARITHMETIC MEAN OF THE ETA-ESTIMATES,
 AND THE P-VALUE IS GIVEN FOR THE NULL HYPOTHESIS THAT THE TRUE MEAN IS 0.

 ETABAR:        -8.1479E-05 -7.0919E-03 -1.6818E-02
 SE:             8.7200E-02  5.8800E-02  8.9668E-02
 N:                      15          15          15

 P VAL.:         9.9925E-01  9.0400E-01  8.5122E-01

 ETASHRINKSD(%)  5.9153E-01  6.6393E+00  1.4660E+01
 ETASHRINKVR(%)  1.1796E+00  1.2838E+01  2.7170E+01
 EBVSHRINKSD(%)  6.3648E-01  6.2768E+00  1.2774E+01
 EBVSHRINKVR(%)  1.2689E+00  1.2160E+01  2.3917E+01
 RELATIVEINF(%)  9.8656E+01  8.6223E+01  7.4697E+01
 EPSSHRINKSD(%)  2.4171E+01
 EPSSHRINKVR(%)  4.2499E+01


 TOTAL DATA POINTS NORMALLY DISTRIBUTED (N):           90
 N*LOG(2PI) CONSTANT TO OBJECTIVE FUNCTION:    165.40893597684109
 OBJECTIVE FUNCTION VALUE WITHOUT CONSTANT:    299.63003354191324
 OBJECTIVE FUNCTION VALUE WITH CONSTANT:       465.03896951875436
 REPORTED OBJECTIVE FUNCTION DOES NOT CONTAIN CONSTANT

 TOTAL EFFECTIVE ETAS (NIND*NETA):                            45


 #TERE:
 Elapsed estimation  time in seconds:     0.20
 Elapsed covariance  time in seconds:     0.01
 Elapsed postprocess time in seconds:     0.03

 ********************               FIRST ORDER CONDITIONAL ESTIMATION WITH INTERACTION              ********************
 #OBJT:**************                       MINIMUM VALUE OF OBJECTIVE FUNCTION                      ********************
 #OBJV:********************************************      299.630       **************************************************

 ********************               FIRST ORDER CONDITIONAL ESTIMATION WITH INTERACTION              ********************
 ********************                             FINAL PARAMETER ESTIMATE                           ********************

 THETA - VECTOR OF FIXED EFFECTS PARAMETERS   *********
         TH 1      TH 2      TH 3      TH 4      TH 5
         9.58E+00  7.69E+01  1.01E+00  8.76E-02  0.00E+00

 OMEGA - COV MATRIX FOR RANDOM EFFECTS - ETAS  ********
         ETA1      ETA2      ETA3
 ETA1
+        1.15E-01
 ETA2
+        0.00E+00  5.95E-02
 ETA3
+        0.00E+00  0.00E+00  1.66E-01

 SIGMA - COV MATRIX FOR RANDOM EFFECTS - EPSILONS  ****
         EPS1
 EPS1
+        1.00E+00

 OMEGA - CORR MATRIX FOR RANDOM EFFECTS - ETAS  *******
         ETA1      ETA2      ETA3
 ETA1
+        3.40E-01
 ETA2
+        0.00E+00  2.44E-01
 ETA3
+        0.00E+00  0.00E+00  4.07E-01

 SIGMA - CORR MATRIX FOR RANDOM EFFECTS - EPSILONS  ***
         EPS1
 EPS1
+        1.00E+00

 ********************               FIRST ORDER CONDITIONAL ESTIMATION WITH INTERACTION              ********************
 ********************                            STANDARD ERROR OF ESTIMATE                          ********************

 THETA - VECTOR OF FIXED EFFECTS PARAMETERS   *********
         TH 1      TH 2      TH 3      TH 4      TH 5
         1.98E+00  7.21E+00  1.52E-01  1.19E-02 .........

 OMEGA - COV MATRIX FOR RANDOM EFFECTS - ETAS  ********
         ETA1      ETA2      ETA3
 ETA1
+        8.08E-02
 ETA2
+       .........  3.76E-02
 ETA3
+       ......... .........  9.09E-02

 SIGMA - COV MATRIX FOR RANDOM EFFECTS - EPSILONS  ****
         EPS1
 EPS1
+       .........

 OMEGA - CORR MATRIX FOR RANDOM EFFECTS - ETAS  *******
         ETA1      ETA2      ETA3
 ETA1
+        1.19E-01
 ETA2
+       .........  7.71E-02
 ETA3
+       ......... .........  1.12E-01

 SIGMA - CORR MATRIX FOR RANDOM EFFECTS - EPSILONS  ***
         EPS1
 EPS1
+       .........

 ********************               FIRST ORDER CONDITIONAL ESTIMATION WITH INTERACTION              ********************
 ********************                          COVARIANCE MATRIX OF ESTIMATE                         ********************

            TH 1      TH 2      TH 3      TH 4      TH 5      OM11      OM12      OM13      OM22      OM23      OM33      SG11
 TH 1
+        3.93E+00
 TH 2
+       -4.45E+00  5.20E+01
 TH 3
+        1.12E-02 -7.60E-02  2.31E-02
 TH 4
+        3.10E-03  4.30E-02 -1.58E-04  1.43E-04
 TH 5
+       ......... ......... ......... ......... .........
 OM11
+        1.36E-01 -8.97E-02 -2.77E-03  1.78E-04 .........  6.53E-03
 OM12
+       ......... ......... ......... ......... ......... ......... .........
 OM13
+       ......... ......... ......... ......... ......... ......... ......... .........
 OM22
+       -8.07E-04  4.59E-02  1.04E-03 -2.84E-05 .........  1.44E-04 ......... .........  1.41E-03
 OM23
+       ......... ......... ......... ......... ......... ......... ......... ......... ......... .........
 OM33
+        2.03E-02 -2.63E-01  6.53E-03 -3.73E-04 ......... -1.03E-03 ......... .........  6.48E-04 .........  8.27E-03
 SG11
+       ......... ......... ......... ......... ......... ......... ......... ......... ......... ......... ......... .........

 ********************               FIRST ORDER CONDITIONAL ESTIMATION WITH INTERACTION              ********************
 ********************                          CORRELATION MATRIX OF ESTIMATE                        ********************

            TH 1      TH 2      TH 3      TH 4      TH 5      OM11      OM12      OM13      OM22      OM23      OM33      SG11
 TH 1
+        1.98E+00
 TH 2
+       -3.11E-01  7.21E+00
 TH 3
+        3.72E-02 -6.94E-02  1.52E-01
 TH 4
+        1.31E-01  4.99E-01 -8.70E-02  1.19E-02
 TH 5
+       ......... ......... ......... ......... .........
 OM11
+        8.46E-01 -1.54E-01 -2.25E-01  1.85E-01 .........  8.08E-02
 OM12
+       ......... ......... ......... ......... ......... ......... .........
 OM13
+       ......... ......... ......... ......... ......... ......... ......... .........
 OM22
+       -1.08E-02  1.69E-01  1.82E-01 -6.32E-02 .........  4.74E-02 ......... .........  3.76E-02
 OM23
+       ......... ......... ......... ......... ......... ......... ......... ......... ......... .........
 OM33
+        1.13E-01 -4.00E-01  4.73E-01 -3.43E-01 ......... -1.40E-01 ......... .........  1.90E-01 .........  9.09E-02
 SG11
+       ......... ......... ......... ......... ......... ......... ......... ......... ......... ......... ......... .........
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
 ********************               FIRST ORDER CONDITIONAL ESTIMATION WITH INTERACTION              ********************
 ********************                      EIGENVALUES OF COR MATRIX OF ESTIMATE                     ********************

             1         2         3         4         5         6         7
         9.31E-02  3.20E-01  4.41E-01  8.78E-01  1.27E+00  1.98E+00  2.02E+00
 Elapsed finaloutput time in seconds:     0.00
 #CPUT: Total CPU Time in Seconds,        0.226
